variable Tm equal $T*1.5

# Define molecule
molecule    mymol ${the_path}/data/${molecule}

# Define units and dimensions
dimension   2
units       lj

# Define type of atoms
atom_style  template mymol

# Define interaction potentials
pair_style  lj/cut 2.5
pair_modify shift yes

if "${atoms} > 1" then &
    "bond_style harmonic"

if "${atoms} > 2" then &
    "angle_style harmonic"

boundary p p p

# Read in interaction parameters
read_data   ${the_path}/data/${mol_settings}

if "${boundary} == 1" then &
    "variable x_min equal lx/4"&
    "variable x_max equal 3*lx/4"&
    "variable y_min equal 0"&
    "variable y_max equal ly"
if "${boundary} == 2" then &
    "variable x_min equal 0"&
    "variable x_max equal lx"&
    "variable y_min equal ly/4"&
    "variable y_max equal 3*ly/4"

# Create region in middle
region middle block ${x_min} ${x_max} ${y_min} ${y_max} -0.5 0.5
group static region middle
group mobile subtract all static

# Exclude bonded interactions for MD steps
neigh_modify exclude molecule all

# Give all atoms the property diameter
fix 5 all property/atom d_diam
set type 1 d_diam 2
variable diam equal ${radius}*2
if "${diam} != 2" then &
    "set type 2 d_diam ${diam}"
compute diam all property/atom d_diam

# Thermodynamic output
thermo          1000
thermo_style    custom step temp press pxx pyy pxy etotal ke pe enthalpy density lx ly xy

log     ${my_path}/logs/create.log

# Simulation parameters, bonds not able to move
fix 1 all npt temp ${Tm} ${Tm} 10 x ${press} ${press} 10 y ${press} ${press} 10 xy 0 0 10
fix 2 all enforce2d
fix 3 static setforce 0.0 0.0 0.0

# Dump configuration printevery steps. Image is dumped at beginning and end
#dump 2 all image ${steps} ${my_path}/images/create_*.jpg  type c_diam size 2048 2048 box yes 1e-3 zoom 1.5

#dump_modify 2 first yes
#dump_modify 2 pad 10

# Give particles an initial velocity
velocity mobile create ${Tm} 122
run 0
velocity mobile scale ${Tm}

#timestep 1e-3

run ${steps}

#min_style cg

#minimize 1e-6 1e-8 1000 1000

# Write restart before minimisation
write_restart   ${the_path}/restarts/${last_restart}
